// SBML level 3 version 1

model feedback()

  // Compartments:
  compartment default_compartment = 1;

  // Species:
  species FBP in default_compartment = 2;
  species GAP in default_compartment = 0;
  species DHAP in default_compartment = 0;
  species NADH in default_compartment = 0.0945;
  species G3P in default_compartment = 0;
  species NAD in default_compartment = 0;

  // Parameters:
  p_FBA1_Vm = 0.00072458;
  p_FBA1_Keq = 0.00065;
  p_FBA1_Kf16bp = 0.4303;
  p_FBA1_Kglyceral3p = 632.4588;
  p_FBA1_Kdhap = 0.0074;
  p_TPI1_Vm = 21.7742;
  p_TPI1_Keq = 0.1065;
  p_GPD1_Vm = 21.7742;
  p_GPD1_Keq = 5000;

  // Reactions:
  vALD: FBP -> GAP + DHAP; p_FBA1_Vm*(FBP - GAP*DHAP/p_FBA1_Keq)/(p_FBA1_Kf16bp*(FBP/p_FBA1_Kf16bp + (1 + GAP/p_FBA1_Kglyceral3p)*(1 + DHAP/p_FBA1_Kdhap)));
  vTPI: DHAP -> GAP; p_TPI1_Vm*(DHAP - GAP/p_TPI1_Keq);
  vGPD: DHAP + NADH -> G3P + NAD; p_GPD1_Vm*(DHAP*NADH - G3P*NAD/p_GPD1_Keq);
end
