// SBML level 3 version 1

model feedback()

  // Compartments:
  compartment default_compartment = 1;

  // Species:
  species BPG in default_compartment = 0;
  species ADP in default_compartment = 10;
  species P3G in default_compartment = 0;
  species ATP in default_compartment = 0;
  species NAD in default_compartment = 1;
  species GAP in default_compartment = 5.8;
  species PHOS in default_compartment = 0;
  species NADH in default_compartment = 0;

  // Parameters:
  p_PGK_Vm = 21.7742;
  p_PGK_Keq = 1923.1;
  p_TDH1_Vmf = 0.0041;
  p_GAPDH_Keq = 0.0123;
  p_TDH1_Kgap = 0.9678;
  p_TDH1_Knad = 0.8771;
  p_TDH1_Knadh = 0.0097;
  p_TDH1_Kbpg = 0.0559;

  // Reactions:
  vPGK: BPG + ADP -> P3G + ATP; p_PGK_Vm*(BPG*ADP - P3G*ATP/p_PGK_Keq);
  vGAPDHfwd: NAD + GAP + PHOS -> BPG + NADH; p_TDH1_Vmf*(GAP*NAD - BPG*NADH/p_GAPDH_Keq)/(p_TDH1_Kgap*p_TDH1_Knad)/((1 + NAD/p_TDH1_Knad + NADH/p_TDH1_Knadh)*(1 + BPG/p_TDH1_Kbpg + GAP/p_TDH1_Kgap));
end
