// SBML level 3 version 1

model feedback()

  // Compartments:
  compartment default_compartment = 1;

  // Species:
  species BPG in default_compartment = 0;
  species ADP in default_compartment = 0;
  species P3G in default_compartment = 5;
  species ATP in default_compartment = 1;
  species NADH in default_compartment = 0.0875;
  species NAD in default_compartment = 0;
  species GAP in default_compartment = 0;
  species PHOS in default_compartment = 500;

  // Parameters:
  p_PGK_Vm = 21.7742;
  p_PGK_Keq = 1923.1;
  p_TDH1_Vmr = 0.0015;
  p_GAPDH_Keq = 0.0123;
  p_TDH1_Kbpg = 0.0143;
  p_TDH1_Knadh = 0.00058235;
  p_TDH1_Knad = 0.0071;
  p_TDH1_Kgap = 0.0222;

  // Reactions:
  vPGK: BPG + ADP -> P3G + ATP; p_PGK_Vm*(BPG*ADP - P3G*ATP/p_PGK_Keq);
  vGAPDHrev: BPG + NADH -> NAD + GAP + PHOS; p_TDH1_Vmr*(BPG*NADH - GAP*NAD*p_GAPDH_Keq)/(p_TDH1_Kbpg*p_TDH1_Knadh)/((1 + NAD/p_TDH1_Knad + NADH/p_TDH1_Knadh)*(1 + BPG/p_TDH1_Kbpg + GAP/p_TDH1_Kgap));
end
