// SBML level 3 version 1

model feedback()

  // Compartments:
  compartment default_compartment = 1;

  // Species:
  species GLCi in default_compartment = 10;
  species ATP in default_compartment = 1;
  species G6P in default_compartment = 0;
  species ADP in default_compartment = 0;
  species NADP in default_compartment = 1;
  species PG6 in default_compartment = 0;
  species NADPH in default_compartment = 0.0636;

  // Parameters:
  p_HXK1_Vm = 0.00026921;
  p_HXK1_Keq = 7000;
  p_HXK1_Katp = 0.00083175;
  p_HXK1_Kglc = 0.0137;
  p_HXK1_Kadp = 183.8396;
  p_HXK1_Kg6p = 6889.1;
  p_HXK1_Kt6p = 0.2;
  p_G6PDH_Vm = 21.7742;
  p_G6PDH_Keq = 16.3;

  // Reactions:
  vGLK: GLCi + ATP -> G6P + ADP; p_HXK1_Vm*(ATP*GLCi - ADP*G6P/p_HXK1_Keq)/(p_HXK1_Katp*p_HXK1_Kglc*(1 + ATP/p_HXK1_Katp + ADP/p_HXK1_Kadp)*(1 + GLCi/p_HXK1_Kglc + G6P/p_HXK1_Kg6p + 0/p_HXK1_Kt6p));
  vG6PDH: G6P + NADP -> PG6 + NADPH; p_G6PDH_Vm*(NADP*G6P - NADPH*PG6/p_G6PDH_Keq);
end
