// SBML level 3 version 1

model feedback()

  // Compartments:
  compartment default_compartment = 1;

  // Species:
  species PYR in default_compartment = 50;
  species CO2 in default_compartment = 0;
  species AcAld in default_compartment = 0;
  species NADH in default_compartment = 0.0823;
  species ETOH in default_compartment = 0;
  species NAD in default_compartment = 0;

  // Parameters:
  p_PDC1_vm = 0.00077593;
  p_PDC1_Kpyr = 8.2185;
  p_PDC1_hill = 2.0231;
  p_ADH_Vm = 21.7742;
  p_ADH_Keq = 769.2308;

  // Reactions:
  vPDC: PYR -> CO2 + AcAld; p_PDC1_vm*(PYR/p_PDC1_Kpyr)^p_PDC1_hill/(1 + (PYR/p_PDC1_Kpyr)^p_PDC1_hill);
  vADH: AcAld + NADH -> ETOH + NAD; p_ADH_Vm*(AcAld*NADH - ETOH*NAD/p_ADH_Keq);
end
