// SBML level 3 version 1

model feedback()

  // Compartments:
  compartment default_compartment = 1;

  // Species:
  species F6P in default_compartment = 10;
  species ATP in default_compartment = 0.5;
  species FBP in default_compartment = 0;
  species ADP in default_compartment = 0;
  species DHAP in default_compartment = 0;
  species GAP in default_compartment = 0;
  species NADH in default_compartment = 0.0899;
  species G3P in default_compartment = 0;
  species NAD in default_compartment = 0;

  // Parameters:
  p_PFK_Vm = 4.2029e-5;
  p_PFK_gR = 20.0132;
  p_PFK_Kf6p = 0.0702;
  p_PFK_Katp = 0.1607;
  p_PFK_L = 0.6246;
  p_PFK_Ciatp = 51.2436;
  p_PFK_Kiatp = 0.9815;
  p_PFK_Camp = 0.0845;
  AMP = 0;
  p_PFK_Kamp = 0.095;
  p_PFK_Cf26bp = 0.0155;
  F26BP = 0.001;
  p_PFK_Kf26bp = 0.0013;
  p_PFK_Cf16bp = 0.3604;
  p_PFK_Kf16bp = 0.0949;
  p_PFK_Catp = 15.0631;
  p_FBA1_Vm = 21.7742;
  p_FBA1_Keq = 0.00065;
  p_GPD1_Vm = 21.7742;
  p_GPD1_Keq = 5000;
  p_TPI1_Vm = 21.7742;
  p_TPI1_Keq = 0.1066;
  p_PFK_F26BP = 0.001;
  p_PFK_Keq = 977;

  // Reactions:
  v_PFK: F6P + ATP -> FBP + ADP; p_PFK_Vm*p_PFK_gR*(F6P/p_PFK_Kf6p)*(ATP/p_PFK_Katp)*(1 + F6P/p_PFK_Kf6p + ATP/p_PFK_Katp + p_PFK_gR*(F6P/p_PFK_Kf6p)*(ATP/p_PFK_Katp))/((1 + F6P/p_PFK_Kf6p + ATP/p_PFK_Katp + p_PFK_gR*(F6P/p_PFK_Kf6p)*(ATP/p_PFK_Katp))^2 + p_PFK_L*((1 + p_PFK_Ciatp*(ATP/p_PFK_Kiatp))/(1 + ATP/p_PFK_Kiatp))^2*((1 + p_PFK_Camp*(AMP/p_PFK_Kamp))/(1 + AMP/p_PFK_Kamp))^2*((1 + p_PFK_Cf26bp*F26BP/p_PFK_Kf26bp + p_PFK_Cf16bp*FBP/p_PFK_Kf16bp)/(1 + F26BP/p_PFK_Kf26bp + FBP/p_PFK_Kf16bp))^2*(1 + p_PFK_Catp*(ATP/p_PFK_Katp))^2);
  v_ALD: FBP -> DHAP + GAP; p_FBA1_Vm*(FBP - GAP*DHAP/p_FBA1_Keq);
  v_GPD: DHAP + NADH -> G3P + NAD; p_GPD1_Vm*(DHAP*NADH - G3P*NAD/p_GPD1_Keq);
  v_TPI: DHAP -> GAP; p_TPI1_Vm*(DHAP - GAP/p_TPI1_Keq);
end
