// SBML level 3 version 1

model feedback()

  // Compartments:
  compartment default_compartment = 1;

  // Species:
  species G6P in default_compartment = 5;
  species F6P in default_compartment = 0;
  species ATP in default_compartment = 1;
  species FBP in default_compartment = 0;
  species ADP in default_compartment = 0;
  species GAP in default_compartment = 0;
  species DHAP in default_compartment = 0;
  species NADH in default_compartment = 0.0475;
  species G3P in default_compartment = 0;
  species NAD in default_compartment = 0;

  // Parameters:
  p_PGI1_Vm = 0.00073826;
  p_PGI1_Keq = 0.366;
  p_PGI1_Kg6p = 1.2033;
  p_PGI1_Kf6p = 2.9277;
  p_PFK1_Vm = 21.7742;
  p_FBA1_Vm = 21.7742;
  p_FBA1_Keq = 0.00065;
  p_TPI1_Vm = 21.7742;
  p_TPI1_Keq = 0.1065;
  p_GPD1_Vm = 21.7742;
  p_GPD1_Keq = 5000;
  p_PFK1_Keq = 977;

  // Reactions:
  v_PGI: G6P -> F6P; p_PGI1_Vm*(G6P - F6P/p_PGI1_Keq)/(1 + G6P/p_PGI1_Kg6p + 1 + F6P/p_PGI1_Kf6p - 1);
  v_PFK: F6P + ATP -> FBP + ADP; p_PFK1_Vm*(F6P*ATP - FBP*ADP/p_PGI1_Keq);
  v_ALD: FBP -> GAP + DHAP; p_FBA1_Vm*(FBP - GAP*DHAP/p_FBA1_Keq);
  v_TPI: DHAP -> GAP; p_TPI1_Vm*(DHAP - GAP/p_TPI1_Keq);
  v_GPD: DHAP + NADH -> G3P + NAD; p_GPD1_Vm*(DHAP*NADH - G3P*NAD/p_GPD1_Keq);
end
