// SBML level 3 version 1

model feedback()

  // Compartments:
  compartment default_compartment = 1;

  // Species:
  species P3G in default_compartment = 5;
  species P2G in default_compartment = 0;
  species PEP in default_compartment = 0;
  species ADP in default_compartment = 10;
  species PYR in default_compartment = 0;
  species ATP in default_compartment = 0;
  species NADH in default_compartment = 0.0651;
  species LAC in default_compartment = 0;
  species NAD in default_compartment = 0;

  // Parameters:
  p_GPM1_vm = 0.0023;
  p_GPM1_K3pg = 1.2031;
  p_GPM1_Keq = 0.189;
  p_GPM1_K2pg = 0.08;
  p_ENO_Vm = 21.7742;
  p_ENO_Keq = 5.19;
  p_PYK_Vm = 21.7742;
  p_PYK_Keq = 10417;
  p_LDH1_Vm = 21.7742;
  p_LDH1_Keq = 8333.3;

  // Reactions:
  v_PGM: P3G -> P2G; p_GPM1_vm/p_GPM1_K3pg*(P3G - P2G/p_GPM1_Keq)/(1 + P3G/p_GPM1_K3pg + P2G/p_GPM1_K2pg);
  v_ENO: P2G -> PEP; p_ENO_Vm*(P2G - PEP/p_ENO_Keq);
  v_PYK: PEP + ADP -> PYR + ATP; p_PYK_Vm*(PEP*ADP - PYR*ATP/p_PYK_Keq);
  v_LDH: PYR + NADH -> LAC + NAD; p_LDH1_Vm*(PYR*NADH - LAC*NAD/p_LDH1_Keq);
end
