// SBML level 3 version 1

model feedback()

  // Compartments:
  compartment default_compartment = 1;

  // Species:
  species ADP in default_compartment = 10;
  species PEP in default_compartment = 2;
  species ATP in default_compartment = 0;
  species PYR in default_compartment = 0;
  species NADH in default_compartment = 0.0655;
  species NAD in default_compartment = 0;
  species LAC in default_compartment = 0;

  // Parameters:
  p_PYK1_Vm = 0.0011;
  p_PYK1_Kadp = 0.2165;
  p_PYK1_Kpep = 0.2523;
  p_PYK1_hill = 4.2326;
  p_PYK1_L = 56592;
  p_PYK1_Katp = 17.0475;
  FBP = 1;
  p_PYK1_Kf16bp = 0.1892;
  p_LDH1_Vm = 21.7742;
  p_LDH1_Keq = 8333.3;
  p_PYK1_Keq = 10417;

  // Reactions:
  vPYK: ADP + PEP -> ATP + PYR; p_PYK1_Vm/(p_PYK1_Kadp*p_PYK1_Kpep)*ADP*PEP/((1 + ADP/p_PYK1_Kadp)*(1 + PEP/p_PYK1_Kpep))*((PEP/p_PYK1_Kpep + 1)^p_PYK1_hill/(p_PYK1_L*((ATP/p_PYK1_Katp + 1)/(FBP/p_PYK1_Kf16bp + 1))^p_PYK1_hill + (PEP/p_PYK1_Kpep + 1)^p_PYK1_hill));
  vLDH: NADH + PYR -> NAD + LAC; p_LDH1_Vm*(PYR*NADH - LAC*NAD/p_LDH1_Keq);
end
