// SBML level 3 version 1

model feedback()

  // Compartments:
  compartment default_compartment = 1;

  // Species:
  species FBP in default_compartment = 0;
  species GAP in default_compartment = 5.8;
  species DHAP in default_compartment = 0;
  species NADH in default_compartment = 0.066;
  species G3P in default_compartment = 0;
  species NAD in default_compartment = 0;

  // Parameters:
  p_GPD1_Vm = 21.7742;
  p_GPD1_Keq = 37037;
  p_TPI1_Vm = 0.0013;
  p_TPI1_Kdhap = 9.5624;
  p_TPI1_Keq = 0.1092;
  p_TPI1_Kglyceral3p = 5.2322;

  // Reactions:
  vALD: FBP -> GAP + DHAP; 0;
  vGPD: DHAP + NADH -> G3P + NAD; p_GPD1_Vm*(DHAP*NADH - G3P*NAD/p_GPD1_Keq);
  vTPI: DHAP -> GAP; p_TPI1_Vm/p_TPI1_Kdhap*(DHAP - GAP/p_TPI1_Keq)/(1 + DHAP/p_TPI1_Kdhap + GAP/p_TPI1_Kglyceral3p);
end
